# solve
sys ccx Living_hinge_1_nl_el

# read results
read Living_hinge_1_nl_el.frd

# plot of equivalent stress
rot y
rot c 30
rot r 30
view disp
view sh
scal d 1000
view elem
ds -1 e 7
plot fv all
hcpy png results
